<?xml version="1.0"?>
<?xml-stylesheet type="text/xsl" href="http://jsbsim.sourceforge.net/JSBSim.xsl"?>
<fdm_config name="T-2C" version="2.0" release="ALPHA"
   xmlns:xsi="http://www.w3.org/2001/XMLSchema-instance"
   xsi:noNamespaceSchemaLocation="http://jsbsim.sourceforge.net/JSBSim.xsd">

 <fileheader>
  <author> Aeromatic v 0.9 </author>
  <filecreationdate> now </filecreationdate>
  <version> 1.0 </version>
  <description> Models a T-2C. </description>
 </fileheader>

 <metrics>
   <wingarea  unit="FT2">  255.00 </wingarea>
   <wingspan  unit="FT" >   38.17 </wingspan>
   <wing_incidence>          2.00 </wing_incidence>
   <chord     unit="FT" >    6.68 </chord>
   <htailarea unit="FT2">   51.00 </htailarea>
   <htailarm  unit="FT" >   15.50 </htailarm>
   <vtailarea unit="FT2">   45.90 </vtailarea>
   <vtailarm  unit="FT" >   15.50 </vtailarm>
   <location name="AERORP" unit="IN">
     <x> 222.00 </x>
     <y>   0.00 </y>
     <z>   0.00 </z>
   </location>
   <location name="EYEPOINT" unit="IN">
     <x>  93.00 </x>
     <y>   0.00 </y>
     <z>  38.00 </z>
   </location>
   <location name="VRP" unit="IN">
     <x>222</x>
     <y>0</y>
     <z>0</z>
   </location>
 </metrics>

 <mass_balance>
   <ixx unit="SLUG*FT2">      7500 </ixx>
   <iyy unit="SLUG*FT2">     11000 </iyy>
   <izz unit="SLUG*FT2">     15000 </izz>
   <ixy unit="SLUG*FT2">         0 </ixy>
   <ixz unit="SLUG*FT2">         0 </ixz>
   <iyz unit="SLUG*FT2">         0 </iyz>
   <emptywt unit="LBS" >      8115 </emptywt>
   <location name="CG" unit="IN">
     <x> 224.00 </x>
     <y>   0.00 </y>
     <z>  -3.00 </z>
   </location>
 </mass_balance>

 <ground_reactions>

  <contact type="BOGEY" name="NOSE">
   <location unit="IN">
     <x>  73.00 </x>
     <y>   0.00 </y>
     <z> -68.00 </z>
   </location>
   <static_friction>  0.80 </static_friction>
   <dynamic_friction> 0.50 </dynamic_friction>
   <rolling_friction> 0.02 </rolling_friction>
   <spring_coeff unit="LBS/FT">       6000.00 </spring_coeff>
   <damping_coeff unit="LBS/FT/SEC">  6000.00 </damping_coeff>
   <max_steer unit="DEG"> 60.00 </max_steer>
   <brake_group>NONE</brake_group>
   <retractable>1</retractable>
 </contact>

  <contact type="BOGEY" name="LEFT_MAIN">
   <location unit="IN">
     <x> 234.00 </x>
     <y>-106.00 </y>
     <z> -70.00 </z>
   </location>
   <static_friction>  0.80 </static_friction>
   <dynamic_friction> 0.50 </dynamic_friction>
   <rolling_friction> 0.02 </rolling_friction>
   <spring_coeff unit="LBS/FT">      12000.00 </spring_coeff>
   <damping_coeff unit="LBS/FT/SEC">  6000.00 </damping_coeff>
   <brake_group>LEFT</brake_group>
   <retractable>1</retractable>
 </contact>

  <contact type="BOGEY" name="RIGHT_MAIN">
   <location unit="IN">
     <x> 234.00 </x>
     <y> 106.00 </y>
     <z> -70.00 </z>
   </location>
   <static_friction>  0.80 </static_friction>
   <dynamic_friction> 0.50 </dynamic_friction>
   <rolling_friction> 0.02 </rolling_friction>
   <spring_coeff unit="LBS/FT">      12000.00 </spring_coeff>
   <damping_coeff unit="LBS/FT/SEC">  6000.00 </damping_coeff>
   <brake_group>RIGHT</brake_group>
   <retractable>1</retractable>
 </contact>
<!--
 <contact type="STRUCTURE" name="LEFT_WING">
    <location unit="IN">
     <x> 240.00 </x>
     <y>-219.50 </y>
     <z> 0 </z>
    </location>
    <static_friction>  1 </static_friction>
    <dynamic_friction> 1 </dynamic_friction>
    <spring_coeff unit="LBS/FT">      8000.00 </spring_coeff>
    <damping_coeff unit="LBS/FT/SEC"> 8000.00 </damping_coeff>
    <damping_coeff_rebound unit="LBS/FT/SEC">80000.00 </damping_coeff_rebound>
 </contact>

  <contact type="STRUCTURE" name="RIGHT_WING">
    <location unit="IN">
     <x> 240.00 </x>
     <y> 219.50 </y>
     <z> 0 </z>
    </location>
    <static_friction>  1 </static_friction>
    <dynamic_friction> 1 </dynamic_friction>
    <spring_coeff unit="LBS/FT">      8000.00 </spring_coeff>
    <damping_coeff unit="LBS/FT/SEC"> 8000.00 </damping_coeff>
    <damping_coeff_rebound unit="LBS/FT/SEC">80000.00 </damping_coeff_rebound>
 </contact>

  <contact type="STRUCTURE" name="AFT_FUSELAGE">
    <location unit="IN">
     <x> 384 </x>
     <y>   0 </y>
     <z>   0 </z>
    </location>
    <static_friction>  1 </static_friction>
    <dynamic_friction> 1 </dynamic_friction>
    <spring_coeff unit="LBS/FT">      8000.00 </spring_coeff>
    <damping_coeff unit="LBS/FT/SEC"> 8000.00 </damping_coeff>
    <damping_coeff_rebound unit="LBS/FT/SEC">80000.00 </damping_coeff_rebound>
 </contact>

  <contact type="STRUCTURE" name="FWD_FUSELAGE">
    <location unit="IN">
     <x>  30 </x>
     <y>   0 </y>
     <z>   0 </z>
    </location>
    <static_friction>  1 </static_friction>
    <dynamic_friction> 1 </dynamic_friction>
    <spring_coeff unit="LBS/FT">      8000.00 </spring_coeff>
    <damping_coeff unit="LBS/FT/SEC"> 8000.00 </damping_coeff>
    <damping_coeff_rebound unit="LBS/FT/SEC">80000.00 </damping_coeff_rebound>
 </contact>
-->
 </ground_reactions>

 <propulsion>

   <engine file="J85-GE-4">
    <location unit="IN">
      <x> 270.00 </x>
      <y> -24.00 </y>
      <z> -10.00 </z>
    </location>
    <feed>0</feed>
    <feed>1</feed>
    <feed>2</feed>
    <thruster file="direct">
     <location unit="IN">
       <x> 270.00 </x>
       <y> -24.00 </y>
       <z> -10.00 </z>
     </location>
     <orient unit="DEG">
       <pitch> 2.00 </pitch>
       <roll>  0.00 </roll>
       <yaw>   0.00 </yaw>
     </orient>
    </thruster>
  </engine>

   <engine file="J85-GE-4">
    <location unit="IN">
      <x> 270.00 </x>
      <y>  24.00 </y>
      <z> -10.00 </z>
    </location>
    <feed>0</feed>
    <feed>1</feed>
    <feed>2</feed>
    <thruster file="direct">
     <location unit="IN">
       <x> 270.00 </x>
       <y>  24.00 </y>
       <z> -10.00 </z>
     </location>
     <orient unit="DEG">
       <pitch> 2.00 </pitch>
       <roll>  0.00 </roll>
       <yaw>   0.00 </yaw>
     </orient>
    </thruster>
  </engine>


  <!-- internal fuel -->
  <tank type="FUEL" number="0">
     <location unit="IN">
       <x> 225.00 </x>
       <y>   0.00 </y>
       <z>   0.00 </z>
     </location>
     <priority>2</priority>
     <capacity unit="LBS"> 3263.00 </capacity>
     <contents unit="LBS"> 3200.00 </contents>
     <standpipe unit="LBS"> 800.00 </standpipe>
  </tank>

  <!-- left external fuel tank -->
  <tank type="FUEL" number="1">
     <location unit="IN">
       <x> 225.00 </x>
       <y>-270.00 </y>
       <z>   0.00 </z>
     </location>
     <capacity unit="LBS"> 683 </capacity>
     <contents unit="LBS"> 0 </contents>
  </tank>

  <!-- right external fuel tank -->
  <tank type="FUEL" number="1">
     <location unit="IN">
       <x> 225.00 </x>
       <y> 270.00 </y>
       <z>   0.00 </z>
     </location>
     <capacity unit="LBS"> 683 </capacity>
     <contents unit="LBS"> 0 </contents>
  </tank>

  <dump-rate unit="LBS/MIN"> 2500 </dump-rate>

 </propulsion>

 <system file="holdback"/>
 <system file="hook"/>
 <system file="catapult"/>
 <system file="canopy"/>
 <system file="gear"/>
 <system file="flaps"/>
 <system file="speedbrakes"/>
 <system file="FCS-pitch"/>
 <system file="FCS-roll"/>
 <system file="FCS-yaw"/>
 <system file="NWS"/>
 <system file="alpha_buffet"/>
 <system file="dump"/>
 <system file="armament"/>
 <system file="crash-detect"/>
 <system file="reverser"/>
 <system file="cat_workaround"/>
 <system file="beacon"/>
 <system file="particles"/>

 <flight_control name="FCS: T2C">
 </flight_control>

 <aerodynamics>

  <axis name="LIFT">

    <function name="aero/coefficient/CLalpha">
      <description>Lift_due_to_alpha</description>
      <product>
          <property>aero/qbar-psf</property>
          <property>metrics/Sw-sqft</property>
          <table>
            <independentVar lookup="row">aero/alpha-rad</independentVar>
            <tableData>
              -0.20 -0.620
               0.00  0.120
               0.26  1.110
               0.60  0.448
            </tableData>
          </table>
      </product>
    </function>

    <function name="aero/coefficient/dCLflap">
       <description>Delta_Lift_due_to_flaps</description>
       <product>
           <property>aero/qbar-psf</property>
           <property>metrics/Sw-sqft</property>
           <property>fcs/flap-pos-norm</property>
           <value> 0.35 </value>
       </product>
    </function>

    <function name="aero/coefficient/CLde">
       <description>Lift_due_to_Elevator_Deflection</description>
       <product>
           <property>aero/qbar-psf</property>
           <property>metrics/Sw-sqft</property>
           <property>fcs/elevator-pos-rad</property>
           <value>0.2</value>
       </product>
    </function>

  </axis>

  <axis name="DRAG">

    <function name="aero/coefficient/CD0">
       <description>Drag_at_zero_lift</description>
       <product>
          <property>aero/qbar-psf</property>
          <property>metrics/Sw-sqft</property>
          <table>
            <independentVar lookup="row">aero/alpha-rad</independentVar>
            <tableData>
             -1.57    1.500
             -0.26    0.031
              0.00    0.024
              0.26    0.031
              1.57    1.500
            </tableData>
          </table>
       </product>
    </function>

    <function name="aero/coefficient/CDi">
       <description>Induced_drag</description>
         <product>
           <property>aero/qbar-psf</property>
           <property>metrics/Sw-sqft</property>
           <property>aero/cl-squared</property>
           <value>0.09</value>
         </product>
    </function>

    <function name="aero/coefficient/CDmach">
       <description>Drag_due_to_mach</description>
        <product>
          <property>aero/qbar-psf</property>
          <property>metrics/Sw-sqft</property>
          <table>
            <independentVar lookup="row">velocities/mach</independentVar>
            <tableData>
                0.00      0.000
                0.68      0.000
                1.10      0.028
                1.80      0.015
            </tableData>
          </table>
        </product>
    </function>

    <function name="aero/coefficient/CDflap">
       <description>Drag_due_to_flaps</description>
         <product>
           <property>aero/qbar-psf</property>
           <property>metrics/Sw-sqft</property>
           <property>fcs/flap-pos-norm</property>
           <value> 0.06 </value>
         </product>
    </function>

    <function name="aero/coefficient/CDgear">
       <description>Drag_due_to_gear</description>
         <product>
           <property>aero/qbar-psf</property>
           <property>metrics/Sw-sqft</property>
           <property>gear/gear-pos-norm</property>
           <value>0.037</value>
         </product>
    </function>

    <function name="aero/coefficient/CDsb">
       <description>Drag_due_to_speedbrakes</description>
         <product>
           <property>aero/qbar-psf</property>
           <property>metrics/Sw-sqft</property>
           <property>fcs/speedbrake-pos-norm</property>
           <value>0.06</value>
         </product>
    </function>

    <function name="aero/coefficient/CDbeta">
       <description>Drag_due_to_sideslip</description>
       <product>
          <property>aero/qbar-psf</property>
          <property>metrics/Sw-sqft</property>
          <table>
            <independentVar lookup="row">aero/beta-rad</independentVar>
            <tableData>
              -1.57    1.230
              -0.26    0.050
               0.00    0.000
               0.26    0.050
               1.57    1.230
            </tableData>
          </table>
       </product>
    </function>

    <function name="aero/coefficient/CDde">
       <description>Drag_due_to_Elevator_Deflection</description>
       <product>
           <property>aero/qbar-psf</property>
           <property>metrics/Sw-sqft</property>
           <abs><property>fcs/elevator-pos-norm</property></abs>
           <value>0.04</value>
       </product>
    </function>

  </axis>

  <axis name="SIDE">

    <function name="aero/coefficient/CYb">
       <description>Side_force_due_to_beta</description>
       <product>
           <property>aero/qbar-psf</property>
           <property>metrics/Sw-sqft</property>
           <property>aero/beta-rad</property>
           <value>-1</value>
       </product>
    </function>

  </axis>

  <axis name="ROLL">

    <function name="aero/coefficient/Clb">
       <description>Roll_moment_due_to_beta</description>
       <product>
           <property>aero/qbar-psf</property>
           <property>metrics/Sw-sqft</property>
           <property>metrics/bw-ft</property>
           <property>aero/beta-rad</property>
           <value>-0.03</value>
       </product>
    </function>

    <function name="aero/coefficient/Clp">
       <description>Roll_moment_due_to_roll_rate</description>
       <product>
           <property>aero/qbar-psf</property>
           <property>metrics/Sw-sqft</property>
           <property>metrics/bw-ft</property>
           <property>aero/bi2vel</property>
           <property>velocities/p-aero-rad_sec</property>
           <value>-0.4</value>
       </product>
    </function>

    <function name="aero/coefficient/Clr">
       <description>Roll_moment_due_to_yaw_rate</description>
       <product>
           <property>aero/qbar-psf</property>
           <property>metrics/Sw-sqft</property>
           <property>metrics/bw-ft</property>
           <property>aero/bi2vel</property>
           <property>velocities/r-aero-rad_sec</property>
           <value>0.15</value>
       </product>
    </function>

    <function name="aero/coefficient/Clda">
       <description>Roll_moment_due_to_aileron</description>
       <product>
          <property>aero/qbar-psf</property>
          <property>metrics/Sw-sqft</property>
          <property>metrics/bw-ft</property>
          <property>fcs/left-aileron-pos-rad</property>
          <table>
            <independentVar lookup="row">velocities/mach</independentVar>
            <tableData>
              0.0    0.110
              2.0    0.037
            </tableData>
          </table>
       </product>
    </function>

    <function name="aero/coefficient/Cldr">
       <description>Roll_moment_due_to_rudder</description>
       <product>
           <property>aero/qbar-psf</property>
           <property>metrics/Sw-sqft</property>
           <property>metrics/bw-ft</property>
           <property>fcs/rudder-pos-rad</property>
           <value>0.006</value>
       </product>
    </function>

  </axis>

  <axis name="PITCH">

    <function name="aero/coefficient/Cmalpha">
       <description>Pitch_moment_due_to_alpha</description>
       <product>
           <property>aero/qbar-psf</property>
           <property>metrics/Sw-sqft</property>
           <property>metrics/cbarw-ft</property>
           <property>aero/alpha-rad</property>
           <value>-0.3</value>
       </product>
    </function>

    <function name="aero/coefficient/Cmde">
       <description>Pitch_moment_due_to_elevator</description>
       <product>
          <property>aero/qbar-psf</property>
          <property>metrics/Sw-sqft</property>
          <property>metrics/cbarw-ft</property>
          <property>fcs/elevator-pos-rad</property>
          <table>
            <independentVar lookup="row">velocities/mach</independentVar>
            <tableData>
              0.0     -0.700
              1.0     -0.400
            </tableData>
          </table>
       </product>
    </function>

    <function name="aero/coefficient/Cmq">
       <description>Pitch_moment_due_to_pitch_rate</description>
       <product>
           <property>aero/qbar-psf</property>
           <property>metrics/Sw-sqft</property>
           <property>metrics/cbarw-ft</property>
           <property>aero/ci2vel</property>
           <property>velocities/q-aero-rad_sec</property>
           <value>-18</value>
       </product>
    </function>

    <function name="aero/coefficient/Cmadot">
       <description>Pitch_moment_due_to_alpha_rate</description>
       <product>
           <property>aero/qbar-psf</property>
           <property>metrics/Sw-sqft</property>
           <property>metrics/cbarw-ft</property>
           <property>aero/ci2vel</property>
           <property>aero/alphadot-rad_sec</property>
           <value>-9</value>
       </product>
    </function>

  </axis>

  <axis name="YAW">

    <function name="aero/coefficient/Cnb">
       <description>Yaw_moment_due_to_beta</description>
       <product>
           <property>aero/qbar-psf</property>
           <property>metrics/Sw-sqft</property>
           <property>metrics/bw-ft</property>
           <property>aero/beta-rad</property>
           <value>0.10</value>
       </product>
    </function>

    <function name="aero/coefficient/Cnr">
       <description>Yaw_moment_due_to_yaw_rate</description>
       <product>
           <property>aero/qbar-psf</property>
           <property>metrics/Sw-sqft</property>
           <property>metrics/bw-ft</property>
           <property>aero/bi2vel</property>
           <property>velocities/r-aero-rad_sec</property>
           <value>-0.15</value>
       </product>
    </function>

    <function name="aero/coefficient/Cndr">
       <description>Yaw_moment_due_to_rudder</description>
       <product>
           <property>aero/qbar-psf</property>
           <property>metrics/Sw-sqft</property>
           <property>metrics/bw-ft</property>
           <property>fcs/rudder-pos-rad</property>
           <value>-0.03</value>
       </product>
    </function>

  </axis>

 </aerodynamics>

 <external_reactions>

  <force name="catapult" frame="LOCAL">
   <location unit="IN">
     <x>   60.0 </x>
     <y>    0.0 </y>
     <z>   -1.0 </z>
   </location>
   <direction>
     <x>   -0.9612617 </x>
     <y>   -0.2756374 </y>
     <z>    0.0 </z>
   </direction>
  </force>

  <force name="holdback" frame="BODY">
   <location unit="IN">
     <x>   60.0 </x>
     <y>    0.0 </y>
     <z>    0.0 </z>
   </location>
   <direction>
     <x>   -1.0 </x>
     <y>    0.0 </y>
     <z>    0.0 </z>
   </direction>
  </force>

  <force name="hook" frame="BODY">
   <location unit="IN">
     <x>  340.0 </x>
     <y>    0.0 </y>
     <z>  -20.0 </z>
   </location>
   <direction>
     <x>   0.9995 </x>
     <y>   0.0    </y>
     <z>   0.01   </z>
   </direction>
  </force>

 </external_reactions>


</fdm_config>
